# Common mode:
# the source of common mode noise through parasitic capacitors
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# the representation circuit with equivalent CM LISN circuit:
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# the FFT of the signal across 25 Ohm resistor
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# Say the attenuation needed is 10 at 300Khz
A := 10
fA := 300 KHz
# the cutoff frequency is:
fc := fA/10^(A/40) = 168.702 KHz
# based on that we can choose L and CY , but CY are limited in value due to leakage current to usually the sum of line-ground , neutral-ground CY caps is 10 nF
Lcm := 1/((2*π*168702)^2*10*10^-9) = 8.9002e-5
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# now at 300Khz and above are below 80
