# Check the conducted EMI emissions of an automotive OBC (On-Board Charger), and design an input filter if need be to meet the governing standard.
# Selling location: Europe
# OBC Input voltage: 220 VAC
# OBC rated power: 5 kW
# Operating frequency: 50 kHz
# Operating Temperature: -20 to +65 °C
# Assume PCB real estate and cost are non-restrictive
# the circuit and the FFT across the 100 Ohm resistor of the LISN (with LISN DM equivalent circuit the signal across 100 Ohm must be divided by 2) before adding the filter
#
# Part 1: DM LC filter
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# between 150Khz and 30Meg (EMI frequencies of interest)according to for example IEC 61851-21-1 regulations the max allowed is 90dbuv (we make it 80dbuv for more margin)
# at 150Khz the attenuation needed is:
A := 32.6
fA := 150 KHz
fc := fA/10^(A/40) = 22.9663 KHz  # for LC filter design
# for Middlebrook's theorem where fc << floop , the Zout of the filter must be 5-10 times smaller than the Zin for the converter
# let us say the Zin for the converter is 10 Ohm so:
Zout := 10 Ω/5 = 2 Ω
Lf := Zout/(2*π*fc) = 13.8599 μH
Cf := 1/(2*π*fc*Zout) = 3.46497 μF
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# required specifications for Lf and Cf:
#
# the current that Lf should carry is :
Il := 5000/220 = 22.7273  # 22.727 A is the current Lf should carry
# and from simulation the ripple current must the Cf withstand is : 616.28 mA and the voltage is 220V
# we changed the values of Lf and Cf to 15uH and 3.9uF as these are found in the digikey
# now we add the parasitic components for Cf and Lf
# from data sheet of the inductor we found that DCR is 200 mOhm
# and from datasheet of the capacitor we find SRF (600Khz in our case) and ESR from impedance graph(at 150Khz) and we calculate the Lcp as follow:
Lcp := 1/((2*π*600000)^2*3.9*10^-6) = 1.80415e-8
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# now we add damping components but before that we simulate the impedance response of the filter:
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# the impedance graph of the filter:
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# note : since the current source is 1 so the V is the same as Z
# Cd for damping must be 3-5 times bigger that Cf and Rd is approximately (0.6-0.9)*Sqrt(Lf/Cf) , we choose 1 in our case , as discussed before the impedance should not exceed 2 Ohm for stability , in the graph above it is more that 10 , below is the
# damped circuit and corresponding Z graph:
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# the green curve is the damped Z response after adding the adding the damping components
